<neuroml xmlns="http://www.neuroml.org/schema/neuroml2"  xmlns:xs="http://www.w3.org/2001/XMLSchema" xmlns:xsi="http://www.w3.org/2001/XMLSchema-instance" xsi:schemaLocation="http://www.neuroml.org/schema/neuroml2 https://raw.github.com/NeuroML/NeuroML2/development/Schemas/NeuroML2/NeuroML_v2beta4.xsd" id="cell_C">

    <gradedSynapse id="neuron_to_neuron_exc_syn" conductance="0.09 nS" delta="5 mV" Vth="0 mV" k="0.025per_ms" erev="0 mV"/>

    <gradedSynapse id="neuron_to_neuron_inh_syn" conductance="0.09 nS" delta="5 mV" Vth="0 mV" k="0.025per_ms" erev="-70 mV"/>

</neuroml>
